# OpenSim document version 40000
Model auto_z013_R:
  gravity: 0 -9.8081 0
  credits:
    Luca Modenese, Jean-Baptist Renault 2020. Model created using the STAPLE (Shared Tools for Automatic Personalised Lower Extremity) modelling toolbox. GitHub page: https://github.com/modenaxe/msk-STAPLE.
  Ground
  BodySet:
    Body pelvis: mass=503644.6 [kg] mass_center=(0.3004398 -0.3102322 -0.5393414)
        inertia=(1781.984 4065.205 3231.122 -46942.73 -81610.36 84270.33)
        meshes=auto_z013_R_r_Geometry\pelvis_no_sacrum.obj
    Body femur_r: mass=314788.7 mass_center=(0.3944768 -0.3232914 -0.7756258)
        inertia=(6382.005 6405.094 130.6264 -40145.3 -96314.76 78934.26) meshes=auto_z013_R_r_Geometry\femur_r.obj
    Body tibia_r: mass=396769.4 mass_center=(0.3852459 -0.3466114 -1.121407)
        inertia=(5088.919 5040.777 141.57 -52980.87 -171411.4 154221.3) meshes=auto_z013_R_r_Geometry\tibia_r.obj
    Body talus_r: mass=41425.77 mass_center=(0.3905335 -0.3554408 -1.332127)
        inertia=(7.732922 7.713603 7.692578 -5750.375 -21551.35 19614.77) meshes=auto_z013_R_r_Geometry\talus_r.obj
    Body calcn_r: mass=195145.2 mass_center=(0.3866785 -0.3530839 -1.370622)
        inertia=(299.5718 315.6087 269.7346 -26643.16 -103425 94439.45) meshes=auto_z013_R_r_Geometry\calcn_r.obj
  JointSet:
    CustomJoint ground_pelvis: socket_parent_frame=ground_offset socket_child_frame=pelvis_offset
      Coordinate pelvis_tilt
      Coordinate pelvis_list
      Coordinate pelvis_rotation
      Coordinate pelvis_tx
      Coordinate pelvis_ty
      Coordinate pelvis_tz
      PhysicalOffsetFrame ground_offset: socket_parent=/ground translation=(0 0 0) [meters]
      PhysicalOffsetFrame pelvis_offset: socket_parent=/bodyset/pelvis translation=(0.3138958 -0.2419984 -0.518633)
          orientation=(1.408755 1.378862 0.01903458) [radians]
      SpatialTransform:
        TransformAxis rotation1: coordinates=pelvis_tilt axis=(0 0 1) LinearFunction(coefficients=1 0)
        TransformAxis rotation2: coordinates=pelvis_list axis=(1 0 0) LinearFunction(coefficients=1 0)
        TransformAxis rotation3: coordinates=pelvis_rotation axis=(0 1 0) LinearFunction(coefficients=1 0)
        TransformAxis translation1: coordinates=pelvis_tx axis=(1 0 0) LinearFunction(coefficients=1 0)
        TransformAxis translation2: coordinates=pelvis_ty axis=(0 1 0) LinearFunction(coefficients=1 0)
        TransformAxis translation3: coordinates=pelvis_tz axis=(0 0 1) LinearFunction(coefficients=1 0)
    CustomJoint hip_r: socket_parent_frame=pelvis_offset socket_child_frame=femur_r_offset
      Coordinate hip_flexion_r
      Coordinate hip_adduction_r
      Coordinate hip_rotation_r
      PhysicalOffsetFrame pelvis_offset: socket_parent=/bodyset/pelvis translation=(0.3840642 -0.3108798 -0.5861062)
          orientation=(1.408755 1.378862 0.01903458)
      PhysicalOffsetFrame femur_r_offset: socket_parent=/bodyset/femur_r translation=(0.3840642 -0.3108798 -0.5861062)
          orientation=(1.557057 1.29228 -0.04959648)
      SpatialTransform: axes_held_at_zero=(translation1 translation2 translation3)
        TransformAxis rotation1: coordinates=hip_flexion_r axis=(0 0 1) LinearFunction(coefficients=1 0)
        TransformAxis rotation2: coordinates=hip_adduction_r axis=(1 0 0) LinearFunction(coefficients=1 0)
        TransformAxis rotation3: coordinates=hip_rotation_r axis=(0 1 0) LinearFunction(coefficients=1 0)
    CustomJoint knee_r: socket_parent_frame=femur_r_offset socket_child_frame=tibia_r_offset
      Coordinate knee_angle_r
      PhysicalOffsetFrame femur_r_offset: socket_parent=/bodyset/femur_r translation=(0.3789096 -0.3340941 -0.9635432)
          orientation=(1.450527 1.292233 0.05283458)
      PhysicalOffsetFrame tibia_r_offset: socket_parent=/bodyset/tibia_r translation=(0.3789096 -0.3340941 -0.9635432)
          orientation=(1.450527 1.292233 0.05629614)
      SpatialTransform: axes_held_at_zero=(rotation2 rotation3 translation1 translation2 translation3)
        TransformAxis rotation1: coordinates=knee_angle_r axis=(0 0 1) LinearFunction(coefficients=1 0)
    CustomJoint ankle_r: socket_parent_frame=tibia_r_offset socket_child_frame=talus_r_offset
      Coordinate ankle_angle_r
      PhysicalOffsetFrame tibia_r_offset: socket_parent=/bodyset/tibia_r translation=(0.3852496 -0.3587765 -1.333594)
          orientation=(1.486728 0.2850541 0.02131661)
      PhysicalOffsetFrame talus_r_offset: socket_parent=/bodyset/talus_r translation=(0.3852496 -0.3587765 -1.333594)
          orientation=(1.486728 0.2850541 -0.6183328)
      SpatialTransform: axes_held_at_zero=(rotation2 rotation3 translation1 translation2 translation3)
        TransformAxis rotation1: coordinates=ankle_angle_r axis=(0 0 1) LinearFunction(coefficients=1 0)
    CustomJoint subtalar_r: socket_parent_frame=talus_r_offset socket_child_frame=calcn_r_offset
      Coordinate subtalar_angle_r
      PhysicalOffsetFrame talus_r_offset: socket_parent=/bodyset/talus_r translation=(0.3648687 -0.37242 -1.342268)
          orientation=(-1.547737 0.9361558 3.06349)
      PhysicalOffsetFrame calcn_r_offset: socket_parent=/bodyset/calcn_r translation=(0.3648687 -0.37242 -1.342268)
          orientation=(-1.547737 0.9361558 3.06349)
      SpatialTransform: axes_held_at_zero=(rotation2 rotation3 translation1 translation2 translation3)
        TransformAxis rotation1: coordinates=subtalar_angle_r axis=(0 0 1) LinearFunction(coefficients=1 0)
  MarkerSet:
    Marker RASI: pelvis (0.419263 -0.2622058 -0.5153296)
    Marker LASI: pelvis (0.2085286 -0.221791 -0.5219364)
    Marker RPSI: pelvis (0.3229987 -0.3808984 -0.497643)
    Marker LPSI: pelvis (0.2515277 -0.3687929 -0.5014662)
    Marker SYMP: pelvis (0.324208 -0.2537903 -0.6182421)
    Marker RKNE: femur_r (0.4153323 -0.3445948 -0.9604681)
    Marker RMFC: femur_r (0.3457312 -0.3179778 -0.9616816)
    Marker RTRO: femur_r (0.4288396 -0.3465654 -0.6086261)
    Marker RTTB: tibia_r (0.4036915 -0.3165405 -1.017496)
    Marker RHFB: tibia_r (0.4150988 -0.3705961 -1.018563)
    Marker RANK: tibia_r (0.3998573 -0.3814724 -1.315)
    Marker RMMA: tibia_r (0.3644204 -0.3416195 -1.311952)
    Marker RLM: tibia_r (0.3898018 -0.3846667 -1.326926)
    Marker RHEE: calcn_r (0.3351832 -0.3909973 -1.327774)
    Marker RD5M: calcn_r (0.4290011 -0.3668296 -1.432387)
    Marker RD1M: calcn_r (0.4075777 -0.2844859 -1.427283)
    Marker R1MGROUND: calcn_r (0.4058559 -0.2858141 -1.426545)
    Marker R5MGROUND: calcn_r (0.4240664 -0.3668507 -1.432888)
    Marker RHEEGROUND: calcn_r (0.3312627 -0.3782948 -1.356364)
